// COMSOL Multiphysics 5.4.0.225 model "OPT_AM_quarter.mph"
// Outline of the model tree

Parameters
  f0 = 50[Hz]  // Frekvence napájení
  w0 = 2*pi*f0  // Úhlová rychlost napájení
  rpm = (60*f0[s])/2  // Otáčky rotoru
  Tp = (pi/6)/((2*pi*rpm[1/s])/60)  // Perioda
  D1 = 72[mm]  // Vnitřní průměr statoru
  jho = 6[mm]  // Výška jha statoru
  D2 = 110[mm]  // Vnější průměr statoru
  Dh = 22[mm]  // Vnější průměr hřídele
  d = 0.2[mm]  // Vzduchová mezera
  D3 = D1-(2*d)  // Vnější průměr rotoru
  L = 81[mm]  // Délka stroje
  td1 = 360/Q  // Drážková rozteč statoru
  Q = 24  // Počet drážek
  N0 = 425  // Počet závitů jedné fáze
  h1 = 1[mm]  // Výška drážky 1
  h2 = (D2/2 - jho - D1/2 - h0 - h1 - b2/2 + pos_d)  // Výška drážky 2
  b1 = 4.2[mm]  // Šířka drážky 1
  b2 = 6.3[mm]  // Šířka drážky 2
  pos_d = (D1/2)-sqrt(((D1/2)^2)-((b1/2)^2))  // Posun drážky
  h0 = 0.5[mm]  // Výška krčku drážky
  b0 = 2.2[mm]  // Šířka krčku drážky
  Im = 4*sqrt(2)  // Amplituda proudu
  beta0 = (360/Q)*2  // Nulová pozice zátěžného úhlu
  beta = 0  // Velikost zátěžného úhlu
  phi = -40[deg]
  vb = (D3/2 - Dh/2 - pev)/4  // Výška bariéry
  poc = (Dh/2)+(vb/2)  // Počátek
  pev = 0.3[mm]  // Pevnostní kritérium
  pos = 1.9  // Posun
  sb1 = 2  // Šířka bariéry 1
  sb2 = 2  // Šířka bariéry 2
  sb3 = 2  // Šířka bariéry 3
  sb4 = 2  // Šířka bariéry 4
  k2 = 0.5  // Koeficient náklonu 2
  k3 = 0.5  // Koeficient náklonu 3
  k4 = 0.5  // Koeficient náklonu 4
  gamma1 = 47  // Úhel rozevření bariéry 1
  gamma2_ = alpha + beta2  // Úhel rozevření bariéry 2
  gamma3_ = alpha + beta3  // Úhel rozevření bariéry 3
  gamma4_ = alpha + beta4  // Úhel rozevření bariéry 4
  x_b1 = ((D3/2)-pos[mm])*cos(gamma1[deg])
  x_b2 = ((D3/2)-pos[mm])*cos(gamma2)
  x_b3 = ((D3/2)-pos[mm])*cos(gamma3)
  x_b4 = ((D3/2)-pos[mm])*cos(gamma4)
  y_b1 = ((D3/2)-pos[mm])*sin(gamma1[deg])
  y_b2 = ((D3/2)-pos[mm])*sin(gamma2)
  y_b3 = ((D3/2)-pos[mm])*sin(gamma3)
  y_b4 = ((D3/2)-pos[mm])*sin(gamma4)
  sektor = 22.5
  epsilon = 90[deg] + alpha
  beta1 = asin((sin(epsilon)/((D3/2)-pos[mm]))*(poc))
  beta2 = asin((sin(epsilon)/((D3/2)-pos[mm]))*(poc+vb))
  beta3 = asin((sin(epsilon)/((D3/2)-pos[mm]))*(poc+2*vb))
  beta4 = asin((sin(epsilon)/((D3/2)-pos[mm]))*(poc+3*vb))
  alpha = atan((y_b1-poc)/x_b1)
  zeta2 = k2*(gamma2_-gamma1[deg])/2
  zeta3 = k3*(gamma3_-gamma2_)/2
  zeta4 = k4*(gamma4_-gamma3_)/2
  gamma2 = gamma2_-zeta2
  gamma3 = gamma3_-zeta3
  gamma4 = gamma4_-zeta4
  pod1 = poc - sb1[mm] - (Dh/2) - pev
  pod2 = vb - sb1[mm] - sb2[mm] - pev
  pod3 = vb - sb2[mm] - sb3[mm] - pev
  pod4 = vb - sb3[mm] - sb4[mm] - pev
  pod5 = poc + (3*vb) + (sb4[mm]) - (D3/2) + pev

Variables
  var1 "Variables 1"
    Ia = Im*cos(w0*t + phi)  // Faze 1 proud
    Ib = Im*cos(w0*t -120[deg] + phi)  // Faze 2 proud
    Ic = Im*cos(w0*t +120[deg] + phi)  // Faze 3 proud
  var4 "Variables 4"
    r = sqrt(X^2+Y^2)  // radiální vzdálenost
    Bphi = (-rmm.BX*Y+rmm.BY*X)/r  // úhlová indukce
    Br = (rmm.BX*X+rmm.BY*Y)/r  // radiální indukce
    Tok_d = intop1(Br*r*L)
    Tok_q = intop2(Br*r*L)

Selections
  sel1: Explicit "Rotor" on domains 10, 11
  sel2: Explicit "Otaceni" on domains 9-15
  sel3: Explicit "Drazky" on domains 2, 4-8
  sel4: Explicit "destination" on boundaries 74

Couplings
  intop1: Integration "Integration D" on points 75
  intop2: Integration "Integration Q" on points 70

Pairs
  ap1: Identity "Identity Boundary Pair 1" | source: boundaries 50; destination: boundaries 74

Coordinate systems
  sys2: Cylindrical "Cylindrical System 2"

Common definitions
  rot1: RotatingDomain on selection sel2
    rotationType = rotationalVelocity
    rotationalVelocityExpression = constantRevolutionsPerTime
    initialAngle = (beta0 + beta)[deg]
    revolutionsPerTime = -rpm[rpm]

Geometry
  geom1 "Geometry 1" (2D, length unit m)
    c3: Circle | rot = sektor; type = curve; r = D3/2; angle = 90
    c2: Circle | rot = sektor; r = D1/2; angle = 90
    c1: Circle | rot = sektor; r = D2/2; angle = 90
    dif1: Difference | input = c1; input2 = c2
    pol1: Polygon
      source = table
      table = 
        {-b0/2, D1/2 - pos_d}
        {-b0/2, D1/2 - pos_d + h0}
        {-b1/2, D1/2 - pos_d + h0 + h1}
        {-b2/2, D1/2 + h2 - pos_d + h0 + h1}
        {b2/2, D1/2 + h2 - pos_d + h0 + h1}
        {b1/2, D1/2 - pos_d +h0 + h1}
        {b0/2, D1/2 - pos_d + h0}
        {b0/2, D1/2 - pos_d}
    c14: Circle | pos = {0, (D2/2-jho-b2/2)}; r = b2/2; angle = 180
    uni1: Union | input = c14, pol1; intbnd = off; edge = all
    rot6: Rotate | input = uni1(1); rot = (sektor - (360/Q)/2)
    rot1: Rotate | input = rot6; rot = range(0,-td1,-90+td1)
    dif4: Difference | input = dif1; input2 = rot1
    pol2: Polygon
      source = table
      table = 
        {-b1/2, D1/2 - pos_d + h0 + h1}
        {-b2/2, D1/2 + h2 - pos_d +h0 + h1}
        {b2/2, D1/2 + h2 - pos_d + h0 + h1}
        {b1/2, D1/2 - pos_d +h0 + h1}
    c15: Circle | pos = {0, (D2/2-jho-b2/2)}; r = b2/2; angle = 180
    uni2: Union | input = c15, pol2; intbnd = off; edge = all
    rot7: Rotate | input = uni2; rot = (sektor - (360/Q)/2)
    rot2: Rotate | input = rot7; rot = range(0,-td1,-90+td1)
    ccur1: ConvertToCurve | input = dif4, rot2
    c5: Circle | rot = sektor; type = curve; r = D1/2 - d/2; angle = 90
    c13: Circle | rot = sektor; type = curve; r = D1/2; angle = 90
    del5: Delete "Delete Entities 5" | input = c13(1) boundaries 1
    csol1: ConvertToSolid | input = del5, c3, c5, ccur1
    del4: Delete "Delete Entities 4" | input = csol1(1) domains 4, 5
    c11: Circle | rot = sektor; type = curve; r = (D3/2); angle = 90
    c12: Circle | rot = sektor; type = curve; r = (D3/2)+(d/2); angle = 90
    c10: Circle | rot = sektor; type = curve; r = Dh/2; angle = 90
    ic1: InterpolationCurve
      type = closed
      table = {{-x_b1, y_b1}, {0, poc+sb1[mm]}, {x_b1, y_b1}, {0, poc - sb1[mm]}, {-x_b1, y_b1}}
      startcond = tangent
      starttang = {0.172534799888, -0.117470593657}
      endcond = tangent
      endtang = {-0.164809252998, 0.144095759731}
    ic3: InterpolationCurve
      type = closed
      table = {{-x_b2, y_b2}, {0, poc+vb+sb2[mm]}, {x_b2, y_b2}, {0, poc+vb-sb2[mm]}}
      starttang = {0.0840364654527, -0.033784209965}
      endtang = {0.0840364654527, 0.033784209965}
    ic5: InterpolationCurve
      type = closed
      table = {{-x_b3, y_b3}, {0, poc+2*vb+sb3[mm]}, {x_b3, y_b3}, {0, poc+2*vb-sb3[mm]}}
      starttang = {0.0684207344179, -0.0149882083933}
      endtang = {0.0684207344179, 0.0149882083933}
    ic7: InterpolationCurve
      type = closed
      table = {{-x_b4, y_b4}, {0, poc+3*vb+sb4[mm]}, {x_b4, y_b4}, {0, poc+3*vb-sb4[mm]}}
      starttang = {0.0517551924318, 0.00556940403813}
      endtang = {0.0517551924318, -0.00556940403813}
    pt1: Point | p = {, D3/2}
    rot4: Rotate | input = ic1, ic3, ic5, ic7, pt1; rot = (-45 + sektor)
    csol3: ConvertToSolid | input = c10, c11, c12, rot4
    fin: Finalize "Form Assembly" | action = assembly

Materials
  mat1: Common "Air" on all domains
    def "Basic"
      relpermeability = 1
      relpermittivity = 1
      dynamicviscosity = eta(T[1/K])[Pa*s]
      ratioofspecificheat = 1.4
      electricconductivity = 0[S/m]
      heatcapacity = Cp(T[1/K])[J/(kg*K)]
      density = rho(pA[1/Pa],T[1/K])[kg/m^3]
      thermalconductivity = k(T[1/K])[W/(m*K)]
      soundspeed = cs(T[1/K])[m/s]
      eta: Piecewise | arg = T; pieces = {200.0, 1600.0, -8.38278E-7+8.35717342E-8*T^1-7.69429583E-11*T^2+4.6437266E-14*T^3-1.06585607E-17*T^4}
      Cp: Piecewise | arg = T; pieces = {200.0, 1600.0, 1047.63657-0.372589265*T^1+9.45304214E-4*T^2-6.02409443E-7*T^3+1.2858961E-10*T^4}
      rho: Analytic | expr = pA*0.02897/8.314/T; args = {pA, T}; dermethod = manual; argders = {{pA, d(pA*0.02897/8.314/T,pA)}, {T, d(pA*0.02897/8.314/T,T)}}
      k: Piecewise | arg = T; pieces = {200.0, 1600.0, -0.00227583562+1.15480022E-4*T^1-7.90252856E-8*T^2+4.11702505E-11*T^3-7.43864331E-15*T^4}
      cs: Analytic | expr = sqrt(1.4*287*T); args = T; dermethod = manual; argders = {T, d(sqrt(1.4*287*T),T)}
    RefractiveIndex
      n = 1
      ki = 0
  mat2: Common "Drazky - Cu" on selection sel3
    def "Basic"
      relpermeability = 1
      electricconductivity = 5.998e7[S/m]
      heatcapacity = 385[J/(kg*K)]
      relpermittivity = 1
      emissivity = 0.5
      density = 8700[kg/m^3]
      thermalconductivity = 400[W/(m*K)]
      youngsmodulus = 110e9[Pa]
      poissonsratio = 0.35
    linzRes "Linearized resistivity"
      rho0 = 1.72e-8[ohm*m]
      alpha = 3.9e-3[1/K]
      Tref = 273.15[K]
  mat9: Common "Plechy" (disabled) on domains 1, 10
    def "Basic"
      electricconductivity = 0[S/m]
      relpermittivity = 1
    BHCurve
      normB = BH(normHin)
      normH = BH_inv(normBin)
      Wpm = BH_prim(normHin)
      normHin = sqrt(H1^2+H2^2+H3^2)
      normBin = sqrt(B1^2+B2^2+B3^2)
      DESCR_PREFIX:normHin = Magnetic field norm
      DESCR_PREFIX:normBin = Magnetic flux density norm
      BH: Interpolation
        table = {{0, 0}, {159, 1}, {177, 1.1}, {205, 1.2}, {255, 1.3}, {370, 1.4}, {718, 1.5}, {1840, 1.6}, {4370, 1.7}, {8330, 1.8}, {12000, 1.85}, {50000, 2}, {1500000, 2.5}}
        extrap = linear
        argunit = A/m
        fununit = T
        defineinv = on
        defineprimfun = on
  mat10: Common "Hridel" (disabled) on domains 11
    def "Basic"
      electricconductivity = (1/(3e-7))[S/m]
      relpermittivity = 1
    BHCurve
      normB = BH(normHin)
      normH = BH_inv(normBin)
      Wpm = BH_prim(normHin)
      normHin = sqrt(H1^2+H2^2+H3^2)
      normBin = sqrt(B1^2+B2^2+B3^2)
      DESCR_PREFIX:normHin = Magnetic field norm
      DESCR_PREFIX:normBin = Magnetic flux density norm
      BH: Interpolation | table = {{0, 0}, {159, 1}, {177, 1.1}, {205, 1.2}, {255, 1.3}, {370, 1.4}, {718, 1.5}, {1840, 1.6}, {4370, 1.7}, {8330, 1.8}}; extrap = linear; argunit = A/m; fununit = T; defineinv = on; defineprimfun = on
  mat11: Common "Plechy2" on domains 1, 10
    def "Basic"
      electricconductivity = 0[S/m]
      relpermittivity = 1
    BHCurve
      normB = BH(normHin)
      normH = BH_inv(normBin)
      Wpm = BH_prim(normHin)
      normHin = sqrt(H1^2+H2^2+H3^2)
      normBin = sqrt(B1^2+B2^2+B3^2)
      DESCR_PREFIX:normHin = Magnetic field norm
      DESCR_PREFIX:normBin = Magnetic flux density norm
      BH: Interpolation
        table = {{0, 0}, {663.146, 1}, {1067.5, 1.1}, {1705.23, 1.2}, {2463.11, 1.3}, {3841.67, 1.4}, {5425.74, 1.5}, {7957.75, 1.6}, {12298.3, 1.7}, {20462.8, 1.8}, {32169.6, 1.9}, {61213.4, 2.0}, {111408, 2.1}, {175070, 2.2}, {261469, 2.3}, {318310, 2.4}}
        extrap = linear
        argunit = A/m
        fununit = T
        defineinv = on
        defineprimfun = on
  mat12: Common "Hridel2" on domains 11
    def "Basic"
      electricconductivity = (1/(3e-7))[S/m]
      relpermittivity = 1
    BHCurve
      normB = BH(normHin)
      normH = BH_inv(normBin)
      Wpm = BH_prim(normHin)
      normHin = sqrt(H1^2+H2^2+H3^2)
      normBin = sqrt(B1^2+B2^2+B3^2)
      DESCR_PREFIX:normHin = Magnetic field norm
      DESCR_PREFIX:normBin = Magnetic flux density norm
      BH: Interpolation
        table = {{0, 0}, {663.146, 1}, {1067.5, 1.1}, {1705.23, 1.2}, {2463.11, 1.3}, {3841.67, 1.4}, {5425.74, 1.5}, {7957.75, 1.6}, {12298.3, 1.7}, {20462.8, 1.8}, {32169.6, 1.9}, {61213.4, 2.0}, {111408, 2.1}, {175070, 2.2}, {261469, 2.3}, {318310, 2.4}}
        extrap = linear
        argunit = A/m
        fununit = T
        defineinv = on
        defineprimfun = on

Physics
  rmm: RotatingMachineryMagnetic on all domains
    dependent variable A = {Ax, Ay, Az}
    ShapeProperty.order_magneticvectorpotential = 1
    ShapeProperty.order_magneticscalarpotential = 1
    d.d = L
    etf1: ElectricFieldTransformation (default)
    al1: AmperesLaw "Ampère's Law 1" (default) | AllowDeprecatedCurves = 1
    mxb1: MixedFormulationBoundary (default)
    mi1: MagneticInsulation (default)
    init1: init "Initial Values 1" (default)
    mtcd1: Coil "Phase A" on domains 2, 4
      coilGroup = 1
      N = N0/4
      coilWindArea = 1[mm^2]
      ICoil = Ia
      VCoil = U1
      ConductorModel = Multi
      AllowDeprecatedCurves = 1
      rcd1: ReverseCoilGroupDomain "Reversed Current Direction 1" on no domains
      cdg1: CoilDomainGroup "Domain Group 1" on all domains
    mtcd3: Coil "Phase C" on domains 5, 6
      coilGroup = 1
      CoilName = 3
      N = N0/4
      coilWindArea = 1[mm^2]
      ICoil = Ic
      VCoil = U2
      ConductorModel = Multi
      AllowDeprecatedCurves = 1
      rcd1: ReverseCoilGroupDomain "Reversed Current Direction 1" on domains 5, 6
      cdg1: CoilDomainGroup "Domain Group 1" on all domains
    mtcd2: Coil "Phase B" on domains 7, 8
      coilGroup = 1
      CoilName = 5
      N = N0/4
      coilWindArea = 1[mm^2]
      ICoil = Ib
      VCoil = U3
      ConductorModel = Multi
      AllowDeprecatedCurves = 1
      rcd1: ReverseCoilGroupDomain "Reversed Current Direction 1" on no domains
      cdg1: CoilDomainGroup "Domain Group 1" on all domains
    fcal1: ForceCalculation "Rotor" on domains 10, 11 | ForceName = Rotor
    al3: AmperesLaw "Nelinearita" on domains 1, 10, 11 | ConstitutiveRelationBH = BHCurve
    pc1: PeriodicCondition on boundaries 68-73 | PeriodicType = AntiPeriodicity; destinationDomains: boundaries 71-73
      dd1: DestinationDomains "Destination Selection 1" on all boundaries
    pc2: PeriodicCondition on boundaries 1, 3, 44, 45
      PeriodicType = AntiPeriodicity
      destinationDomains: boundaries 44, 45
      dd1: DestinationDomains "Destination Selection 1" on all boundaries
    ssc1: SectorSymmetry on all boundaries | nsector = 4; PeriodicType = AntiPeriodicity; pairs = ap1
      mi1: MagneticInsulation (default)

Mesh
  mesh1 "Mesh 1"
    size: MeshSizeDefault | hauto = 8
    ftri1: FreeTri "Free Triangular 1" on entire geometry
      size1: Size on domains 10, 11
      size2: Size on domains 3, 9 | hauto = 1
      size3: Size on selection sel4 | hauto = 1
      size4: Size on domains 12-15 | hauto = 3

Studies
  std1 "Study 1"
    time: Transient "Time Dependent" | tlist = range(0,1E-4,Tp); usertol = on

Solver configurations
  sol2 "Solution 2" (study std1)
    v1: Variables "Dependent Variables 1" | scalemethod = init
    t1: Time "Time-Dependent Solver 1"
      tlist = range(0,1E-4,Tp)
      atolglobalvaluemethod = manual
      atolvaluemethod = {comp1_A, manual}
      tstepsbdf = strict
      maxorder = 2
      estrat = exclude
      dDef: Direct | linsolver = pardiso
      fc1: FullyCoupled | maxiter = 8; ntolfact = 1e-3; jtech = onevery

Datasets
  dset1: Solution | solution = sol2
  sec1: Sector2D | data = dset1; sectors = 4; rotinv = on

Derived values
  gev1: EvalGlobal "M_av" | data = dset1; table = tbl1; expr = {4*rmm.Tax_Rotor, }; unit = {N*m, }; dataseries = average
  gev2: EvalGlobal "M_sd" | data = dset1; table = tbl1; expr = {4*rmm.Tax_Rotor, }; unit = {N*m, }; dataseries = stddev
  int2: IntSurface "Pfe" on domains 10
    data = dset1
    table = tbl1
    expr = (10e3)*(rmm.normB)^2
    unit = kg^2*m^2/(s^4*A^2)
    method = integration
    dataseries = average
    dataseriesmethod = integration
  max1: MaxSurface "Bmax" on domains 10
    data = dset1
    table = tbl1
    expr = rmm.normB
    unit = T
    descr = Magnetic flux density norm
    dataseries = maximum
  gev5: EvalGlobal "Ld"
    data = dset1
    table = tbl1
    expr = {Tok_d/((Im[A]/sqrt(2))*cos(phi)), }
    unit = {mH, }
    dataseries = rms
    dataseriesmethod = integration
  gev6: EvalGlobal "Lq"
    data = dset1
    table = tbl1
    expr = {Tok_q/((Im[A]/sqrt(2))*sin(phi)), }
    unit = {mH, }
    dataseries = rms
    dataseriesmethod = integration

Tables
  tbl1: Table "M" | filename = M.txt
    Time | Average: 4*rmm.Tax_Rotor (N*m) | Standard deviation: 4*rmm.Tax_Rotor (N*m) | Average: (10e3)*(rmm.normB)^2 (kg^2*m^2/(s^4*A^2)) | Maximum: Magnetic flux density norm (T) | RMS: Tok_d/((Im[A]/sqrt(2))*cos(phi)) (mH) | RMS: Tok_q/((Im[A]/sqrt(2))*sin(phi)) (mH)
    0 | 1.91886 | 0.170487 | 5.23173 | 2.69807 | 0.675308 | 0.231945

Plots
  pg1: PlotGroup1D "M" (disabled) | data = dset1
    glob1: Global | expr = {rmm.Tax_Rotor*4, }; unit = {N*m, }
  pg5: PlotGroup1D "I" (disabled) | data = dset1
    glob1: Global
      expr = {rmm.ICoil_1, rmm.ICoil_3, rmm.ICoil_5}
      unit = {A, A, A}
      descr = {Coil current, Coil current, Coil current}
  pg6: PlotGroup1D "U" (disabled) | data = dset1
    glob1: Global
      expr = {rmm.VCoil_1, rmm.VCoil_3, rmm.VCoil_5}
      unit = {V, V, V}
      descr = {Coil voltage, Coil voltage, Coil voltage}
  pg3: PlotGroup1D "B_gap" (disabled) | data = dset1
    lngr1: LineGraph on boundaries 68, 71-74 | expr = Br; descr = radiální indukce
  pg7: PlotGroup1D "Toky" (disabled) | data = dset1
    glob1: Global | expr = {Tok_d, Tok_q}; unit = {Wb, Wb}
  pg4: PlotGroup2D "J" (disabled) | data = sec1
    surf1: Surface | expr = rmm.normJ; unit = A/mm^2; descr = Current density norm
  pg8: PlotGroup2D "B" (disabled) | data = sec1
    surf1: Surface | expr = rmm.normB
    con1: Contour | expr = rmm.Az; unit = Wb/m; descr = Magnetic vector potential, z component
  pg9: PlotGroup2D "H" (disabled) | data = sec1
    surf1: Surface | expr = rmm.normH; unit = A/m; descr = Magnetic field norm

Exports
  plot1: Plot "B_gap" (disabled) | filename = /home/honza/Desktop/SM/artap/B_gap.txt
  plot2: Plot "M_time" (disabled) | filename = C:\Users\Kasi\Desktop\Motor\M_time_1.txt
  tbl1: Table "M_hodnoty" | table = tbl1; filename = ./out.txt